*Heading
** Job name: Job-5 Model name: test5
** Generated by: Abaqus/CAE 6.9-EF2
*Preprint, echo=NO, model=NO, history=NO, contact=NO
**
** PARTS
**
*Part, name=SpecH3
*Node
      1,  0.164429173, 0.0299213007
      2,           0.,  0.100000001
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*Element, type=CAX8R
  1,  154,  151,    5,   79,  566,  567,  568,  569
  2,   78,    5,  151,  100,  570,  567,  571,  572
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*Nset, nset=_PickedSet2, internal, generate
    1,  1653,     1
*Elset, elset=_PickedSet2, internal, generate
   1,  524,    1
** Section: Section-1
*Solid Section, elset=_PickedSet2, material=Material-1
1.,
*End Part
**
**
** ASSEMBLY
**
*Assembly, name=Assembly
**
*Instance, name=SpecH3-1, part=SpecH3
*End Instance
**
*Nset, nset=_PickedSet5, internal, instance=SpecH3-1
 8,
*Nset, nset=_PickedSet7, internal, instance=SpecH3-1
 8,
*Nset, nset=_PickedSet8, internal, instance=SpecH3-1
 8,
*Nset, nset=_PickedSet10, internal, instance=SpecH3-1
   3,   4,  47,  48,  49,  50
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*Elset, elset=_PickedSet10, internal, instance=SpecH3-1
  11,  22,  24,  27,  29,  31
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*Nset, nset=_PickedSet11, internal, instance=SpecH3-1
    2,    3,    8,   28,   29,   30
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*Elset, elset=_PickedSet11, internal, instance=SpecH3-1
  12,  14,  15,  17,  27,  28
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*Nset, nset=ReactionNode, instance=SpecH3-1
 8,
*Nset, nset=InnerNode, instance=SpecH3-1
 3,
*Elset, elset=__PickedSurf4_S4, internal, instance=SpecH3-1
 443, 456, 472
*Elset, elset=__PickedSurf4_S3, internal, instance=SpecH3-1
 450,
*Elset, elset=__PickedSurf4_S2, internal, instance=SpecH3-1
 487,
*Surface, type=ELEMENT, name=_PickedSurf4, internal
__PickedSurf4_S4, S4
__PickedSurf4_S3, S3
__PickedSurf4_S2, S2
** Constraint: Constraint-1
*Coupling, constraint name=Constraint-1, ref node=_PickedSet5, surface=_PickedSurf4
*Kinematic
2, 2
6, 6
*End Assembly
*Amplitude, name=Amp-3, definition=EQUALLY SPACED, fixed interval=0.1
          0.,   0.00984252,  -0.00511811,   0.00984252,  -0.00511811,   0.00984252,  -0.00511811,   0.00984252
**
** MATERIALS
**
*Material, name=Material-1
*Elastic
29000., 0.3
*Plastic, hardening=COMBINED, datatype=PARAMETERS, number backstresses=2
50.,   1.,   0.,1570.,  40.
*Cyclic Hardening, parameters
50.,17., 5.
**
** BOUNDARY CONDITIONS
**
** Name: HoldBot Type: Displacement/Rotation
*Boundary
_PickedSet10, 2, 2
** Name: HoldTop Type: Displacement/Rotation
*Boundary
_PickedSet8, 6, 6
** Name: axisym Type: Displacement/Rotation
*Boundary
_PickedSet11, 1, 1
** ----------------------------------------------------------------
**
** STEP: Pull
**
*Step, name=Pull, nlgeom=YES, inc=10000
*Static
0.005, 1., 1e-05, 0.005
**
** BOUNDARY CONDITIONS
**
** Name: Pull Type: Displacement/Rotation
*Boundary, amplitude=Amp-3
_PickedSet7, 2, 2, 1.0
**
** OUTPUT REQUESTS
**
*Restart, write, frequency=0
**
** FIELD OUTPUT: F-Output-1
**
*Output, field
*Node Output
CF, RF, U
*Element Output, directions=YES
LE, PE, PEEQ, PEMAG, S
**
** HISTORY OUTPUT: ReactionData
**
*Output, history
*Node Output, nset=ReactionNode
RF2, U2
*End Step
